# OpenSim document version 40600
Model das3_v40600_left_mirror_rename:
  gravity: 0 -9.80665 0
  Ground
  BodySet:
    Body thorax: mass=20 [kg] mass_center=(0 -0.1486 0.0591) inertia=(1.29841 0.55245 1.29841 0 0 0)
        meshes=(ground_ribs.vtp ground_spine.vtp ground_skull.vtp ground_jaw.vtp)
      WrapEllipsoid serr_ant: translation=(0 -0.1486 0.0591) quadrant=all dimensions=(0.147 0.2079 0.0944)
    Body clavicle_1_l: mass=0 mass_center=(0 0 0) inertia=(0 0 0 0 0 0)
    Body clavicle_2_l: mass=0 mass_center=(0 0 0) inertia=(0 0 0 0 0 0)
    Body clavicle_l: mass=0.156 mass_center=(-0.0983 0.0167 0.0042)
        inertia=(6.4e-6 2.63e-5 2.43e-5 -6.7e-6 -9.5e-6 2.9e-6) meshes=lclavicle.obj
    Body scapula_1_l: mass=0 mass_center=(0 0 0) inertia=(0 0 0 0 0 0)
    Body scapula_2_l: mass=0 mass_center=(0 0 0) inertia=(0 0 0 0 0 0)
    Body scapula_l: mass=0.7054 mass_center=(0.053 -0.0229 -0.0247) inertia=(0.001 0.001 0.001 0 0 0)
        meshes=lscapula.obj
    Body humerus_1_l: mass=0 mass_center=(0 0 0) inertia=(0 0 0 0 0 0)
    Body humerus_2_l: mass=0 mass_center=(0 0 0) inertia=(0 0 0 0 0 0)
    Body humerus_l: mass=2.0519 mass_center=(-0.0064 -0.0776 -0.0036) inertia=(0.0132 0.001988 0.0132 0 0 0)
        meshes=lhumerus.obj
      WrapSphere deltoid: xyz_body_rotation=(-0.193033 -0.238063 -0.385718) translation=(0.0022 -0.0009 -0.0018)
          quadrant=all radius=0.0272
      WrapSphere inf_sup_sub: xyz_body_rotation=(-0.193033 -0.238063 -0.385718) translation=(-0.0017 0.0018 -0.0013)
          quadrant=all radius=0.0231
      WrapCylinder infra_cyl: xyz_body_rotation=(1.56643 0.00610865 -0.953124) translation=(0.0054 -0.023 -0.0044)
          quadrant=-x radius=0.014 length=0.12
      WrapCylinder ter_min_cyl: xyz_body_rotation=(1.56643 0.00610865 -1.47672) translation=(0.0054 -0.023 -0.0044)
          quadrant=-x radius=0.015 length=0.1
      WrapCylinder ter_lat_pec: xyz_body_rotation=(1.56643 0.00610865 -0.953124) translation=(0.0057 -0.073 -0.0042)
          quadrant=all radius=0.01 length=0.1
    Body ulna_l: mass=0.5464 mass_center=(0.0003 -0.0634 -0.0039) inertia=(0.0030585 0.00045325 0.0030585 0 0 0)
        meshes=lulna.obj
      WrapCylinder elbow: xyz_body_rotation=(-2.51153 1.54654 2.79253) translation=(0 0 0) quadrant=y radius=0.019
          length=0.05
      WrapCylinder elbow_circ: xyz_body_rotation=(0.630064 -1.54654 0) translation=(0 0 0) quadrant=all radius=0.015
          length=0.05
      WrapCylinder pron_quad: xyz_body_rotation=(-1.28805 -0.232652 0) translation=(0.0365 -0.2064 -0.0577) quadrant=y
          radius=0.007 length=0.1
    Body radius_l: mass=0.5464 mass_center=(-0.0106 -0.1179 -0.0129) inertia=(0.0030585 0.00045325 0.0030585 0 0 0)
        meshes=lradius.obj
      WrapCylinder radius: xyz_body_rotation=(-1.61286 -0.202284 -1.77709) translation=(0.0035 -0.0322 -0.0003)
          quadrant=-x radius=0.0092 length=0.2
      WrapCylinder supinator: xyz_body_rotation=(-1.48877 0.00174533 0) translation=(0.0034 -0.1196 -0.0069)
          quadrant=-y radius=0.009 length=0.2
      WrapCylinder ulna_radius: xyz_body_rotation=(1.54095 0.256214 2.67035) translation=(0.0146 -0.0891 0.0003)
          quadrant=-x radius=0.0071 length=0.1
    Body hand_l: mass=0.525 mass_center=(0.0006 -0.0905 -0.0365) inertia=(0.0006387 0.0001904 0.0006387 0 0 0)
        meshes=l_hand.obj
  JointSet:
    WeldJoint base: socket_parent_frame=ground_offset socket_child_frame=thorax_offset
      PhysicalOffsetFrame ground_offset: socket_parent=/ground translation=(0 0 0) [meters]
      PhysicalOffsetFrame thorax_offset: socket_parent=/bodyset/thorax translation=(0 0 0)
    CustomJoint sc1_l: socket_parent_frame=thorax_offset socket_child_frame=clavicle_1_l_offset
      Coordinate SC_l_y: default_value=0.5844408 range=(0.3316 1.1345) clamped=false
      PhysicalOffsetFrame thorax_offset: socket_parent=/bodyset/thorax translation=(-0.0014 -0.0152 0.0028)
      PhysicalOffsetFrame clavicle_1_l_offset: socket_parent=/bodyset/clavicle_1_l translation=(0 0 0)
      SpatialTransform: axes_held_at_zero=(rotation2 rotation3 translation1 translation2 translation3)
        TransformAxis rotation1: coordinates=SC_l_y axis=(0 1 0) LinearFunction(coefficients=1 0)
    CustomJoint sc2_l: socket_parent_frame=clavicle_1_l_offset socket_child_frame=clavicle_2_l_offset
      Coordinate SC_l_z: default_value=-0.0873 range=(-0.5236 -0.0873) clamped=false
      PhysicalOffsetFrame clavicle_1_l_offset: socket_parent=/bodyset/clavicle_1_l translation=(0 0 0)
      PhysicalOffsetFrame clavicle_2_l_offset: socket_parent=/bodyset/clavicle_2_l translation=(0 0 0)
      SpatialTransform: axes_held_at_zero=(rotation1 rotation3 translation1 translation2 translation3)
        TransformAxis rotation2: coordinates=SC_l_z axis=(0 0 1) LinearFunction(coefficients=1 0)
    CustomJoint sc3_l: socket_parent_frame=clavicle_2_l_offset socket_child_frame=clavicle_l_offset
      Coordinate SC_l_x: default_value=0.5744638 range=(0 1.4486) clamped=false
      PhysicalOffsetFrame clavicle_2_l_offset: socket_parent=/bodyset/clavicle_2_l translation=(0 0 0)
      PhysicalOffsetFrame clavicle_l_offset: socket_parent=/bodyset/clavicle_l translation=(0 0 0)
      SpatialTransform: axes_held_at_zero=(rotation1 rotation2 translation1 translation2 translation3)
        TransformAxis rotation3: coordinates=SC_l_x axis=(1 0 0) LinearFunction(coefficients=1 0)
    CustomJoint ac1_l: socket_parent_frame=clavicle_l_offset socket_child_frame=scapula_1_l_offset
      Coordinate AC_l_y: default_value=-0.7953626 range=(-1.2043 -0.576) clamped=false
      PhysicalOffsetFrame clavicle_l_offset: socket_parent=/bodyset/clavicle_l translation=(-0.2077 -0.0001 0.0282)
      PhysicalOffsetFrame scapula_1_l_offset: socket_parent=/bodyset/scapula_1_l translation=(0 0 0)
      SpatialTransform: axes_held_at_zero=(rotation2 rotation3 translation1 translation2 translation3)
        TransformAxis rotation1: coordinates=AC_l_y axis=(0 1 0) LinearFunction(coefficients=1 0)
    CustomJoint ac2_l: socket_parent_frame=scapula_1_l_offset socket_child_frame=scapula_2_l_offset
      Coordinate AC_l_z: default_value=-0.00799797 range=(-0.3491 0.3819) clamped=false
      PhysicalOffsetFrame scapula_1_l_offset: socket_parent=/bodyset/scapula_1_l translation=(0 0 0)
      PhysicalOffsetFrame scapula_2_l_offset: socket_parent=/bodyset/scapula_2_l translation=(0 0 0)
      SpatialTransform: axes_held_at_zero=(rotation1 rotation3 translation1 translation2 translation3)
        TransformAxis rotation2: coordinates=AC_l_z axis=(0 0 1) LinearFunction(coefficients=1 0)
    CustomJoint ac3_l: socket_parent_frame=scapula_2_l_offset socket_child_frame=scapula_l_offset
      Coordinate AC_l_x: default_value=-0.2105165 range=(-0.2967 0.3142) clamped=false
      PhysicalOffsetFrame scapula_2_l_offset: socket_parent=/bodyset/scapula_2_l translation=(0 0 0)
      PhysicalOffsetFrame scapula_l_offset: socket_parent=/bodyset/scapula_l translation=(0 0 0)
      SpatialTransform: axes_held_at_zero=(rotation1 rotation2 translation1 translation2 translation3)
        TransformAxis rotation3: coordinates=AC_l_x axis=(1 0 0) LinearFunction(coefficients=1 0)
    CustomJoint gh1_l: socket_parent_frame=scapula_l_offset socket_child_frame=humerus_1_l_offset
      Coordinate GH_l_y: default_value=0.7655775 range=(-2.9671 3.0543) clamped=false
      PhysicalOffsetFrame scapula_l_offset: socket_parent=/bodyset/scapula_l translation=(-0.002 -0.023 -0.0439)
      PhysicalOffsetFrame humerus_1_l_offset: socket_parent=/bodyset/humerus_1_l translation=(0 0 0)
      SpatialTransform: axes_held_at_zero=(rotation1 rotation3 translation1 translation2 translation3)
        TransformAxis rotation2: coordinates=GH_l_y axis=(0 1 0) LinearFunction(coefficients=1 0)
    CustomJoint gh2_l: socket_parent_frame=humerus_1_l_offset socket_child_frame=humerus_2_l_offset
      Coordinate GH_l_z: default_value=0.00379958 range=(-1.4661 0.5236) clamped=false
      PhysicalOffsetFrame humerus_1_l_offset: socket_parent=/bodyset/humerus_1_l translation=(0 0 0)
      PhysicalOffsetFrame humerus_2_l_offset: socket_parent=/bodyset/humerus_2_l translation=(0 0 0)
      SpatialTransform: axes_held_at_zero=(rotation1 rotation2 translation1 translation2 translation3)
        TransformAxis rotation3: coordinates=GH_l_z axis=(0 0 1) LinearFunction(coefficients=1 0)
    CustomJoint gh3_l: socket_parent_frame=humerus_2_l_offset socket_child_frame=humerus_l_offset
      Coordinate GH_l_yy: default_value=-0.6049077 range=(-3.0892 3.1241) clamped=false
      PhysicalOffsetFrame humerus_2_l_offset: socket_parent=/bodyset/humerus_2_l translation=(0 0 0)
      PhysicalOffsetFrame humerus_l_offset: socket_parent=/bodyset/humerus_l translation=(0 0 0)
      SpatialTransform: axes_held_at_zero=(rotation1 rotation3 translation1 translation2 translation3)
        TransformAxis rotation2: coordinates=GH_l_yy axis=(0 1 0) LinearFunction(coefficients=1 0)
    CustomJoint hu_l: socket_parent_frame=humerus_l_offset socket_child_frame=ulna_l_offset
      Coordinate EL_l_x: default_value=0.08726646 range=(0.08726646 2.443461) clamped=false
      PhysicalOffsetFrame humerus_l_offset: socket_parent=/bodyset/humerus_l translation=(-0.0058 -0.2907 -0.0049)
      PhysicalOffsetFrame ulna_l_offset: socket_parent=/bodyset/ulna_l translation=(0 0 0)
      SpatialTransform: axes_held_at_zero=(rotation2 rotation3 translation1 translation2 translation3)
        TransformAxis rotation1: coordinates=EL_l_x axis=(0.9997661 0.008446 -0.019909)
            LinearFunction(coefficients=1 0)
    CustomJoint ur_l: socket_parent_frame=ulna_l_offset socket_child_frame=radius_l_offset
      Coordinate PS_l_y: default_value=0.08726646 range=(0.08726646 2.792527) clamped=false
      PhysicalOffsetFrame ulna_l_offset: socket_parent=/bodyset/ulna_l translation=(-0.0171 -0.0133 -0.0163)
      PhysicalOffsetFrame radius_l_offset: socket_parent=/bodyset/radius_l translation=(0 0 0)
      SpatialTransform: axes_held_at_zero=(rotation2 rotation3 translation1 translation2 translation3)
        TransformAxis rotation1: coordinates=PS_l_y axis=(-0.113295 0.9740588 0.195892)
            LinearFunction(coefficients=1 0)
    WeldJoint rc_l: socket_parent_frame=radius_l_offset socket_child_frame=hand_l_offset
      PhysicalOffsetFrame radius_l_offset: socket_parent=/bodyset/radius_l translation=(-0.0169 -0.2251 -0.0712)
      PhysicalOffsetFrame hand_l_offset: socket_parent=/bodyset/hand_l translation=(0 0 0)
