# OpenSim document version 40600
Model ScapulothorachicJoint_Shoulder_v40600_l:
  gravity: 0 -9.80665 0
  length_units: meters
  force_units: N
  credits:
    Model constructed by Ricardo Matias and Ajay Seth. Scapulothoracic joint developed by Seth et al. [1]; segment dimensions and joint locations were obtained from Holzbaur et al. [2], and segment inertial properties obtained from Breteler et al. [3]
  publications:
    [1] Seth A, Matias R, Veloso A, Delp SL. A biomechanical model of the scapulothoracic joint to accurately capture scapula kinematics during shoulder movements. PLoS One. 2015. [2] Holzbaur KRS, Murray WM, Delp SL. A Model of the Upper Extremity for Simulating Musculoskeletal Surgery and Analyzing Neuromuscular Control. Ann Biomed Eng 33:829–840. 2005. [3] Breteler KMD, Spoor CW, Van der Helm FC. Measuring muscle and joint geometry parameters of a shoulder for modeling purposes. J Biomech 32:1191–7. 1999.
  Ground
  BodySet:
    Body thorax: mass=20 [kg] mass_center=(-0.0591 -0.1486 0) inertia=(1.29841 0.55245 1.29841 0 0 0)
        meshes=(thorax.obj groundspine.obj)
      WrapEllipsoid ScapulothoracicEllipsoid: translation=(-0.02 -0.0173 0.0609) quadrant=all
          dimensions=(0.07 0.15 0.07)
    Body clavicle_l: mass=0.156 mass_center=(0.02172 0.01007 0.06704)
        inertia=(6.4e-6 2.63e-5 2.43e-5 -6.7e-6 -9.5e-6 2.9e-6) meshes=l_clavicle.obj
    Body scapula_l: mass=0.7054 mass_center=(0.04612 -0.0319 -0.04565) inertia=(0.001 0.001 0.001 0 0 0)
        meshes=l_scapula.obj
    Body humerus_l: mass=2.0519 mass_center=(-0.00537 -0.11493 -0.00261) inertia=(0.0132 0.001988 0.0132 0 0 0)
        meshes=l_humerus.obj
    Body ulna_l: mass=0.5464 mass_center=(0.00927581 -0.105108 0.0261565)
        inertia=(0.0030585 0.00045325 0.0030585 0 0 0) meshes=l_ulna.obj
    Body radius_l: mass=0.5464 mass_center=(-0.0154894 -0.104396 0.0138558)
        inertia=(0.0030585 0.00045325 0.0030585 0 0 0) meshes=l_radius.obj
    Body hand_l: mass=0.525 mass_center=(-0.0006 -0.0905 -0.0365) inertia=(0.0006387 0.0001904 0.0006387 0 0 0)
        meshes=(lunate.vtp scaphoid.vtp pisiform.vtp triquetrum.vtp capitate.vtp trapezium.vtp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)
  JointSet:
    CustomJoint ground_thorax: socket_parent_frame=ground_offset socket_child_frame=thorax_offset
      Coordinate ground_thorax_rot_x: default_value=0 range=(-1.570796 1.570796) clamped=true locked=true
      Coordinate ground_thorax_rot_y: default_value=0 range=(-1.570796 1.570796) clamped=true locked=true
      Coordinate ground_thorax_rot_z: default_value=0 range=(-1.570796 1.570796) clamped=true locked=true
      Coordinate ground_thorax_tx: default_value=0 range=(-1 1) clamped=false locked=true
      Coordinate ground_thorax_ty: default_value=0 range=(-1 1) clamped=false locked=true
      Coordinate ground_thorax_tz: default_value=0 range=(-1 1) clamped=false locked=true
      PhysicalOffsetFrame ground_offset: socket_parent=/ground translation=(0 0 0) [meters]
      PhysicalOffsetFrame thorax_offset: socket_parent=/bodyset/thorax translation=(0 0 0)
      SpatialTransform:
        TransformAxis rotation1: coordinates=ground_thorax_rot_x axis=(1 0 0) LinearFunction(coefficients=1 0)
        TransformAxis rotation2: coordinates=ground_thorax_rot_y axis=(0 1 0) LinearFunction(coefficients=1 0)
        TransformAxis rotation3: coordinates=ground_thorax_rot_z axis=(0 0 1) LinearFunction(coefficients=1 0)
        TransformAxis translation1: coordinates=ground_thorax_tx axis=(1 0 0) LinearFunction(coefficients=1 0)
        TransformAxis translation2: coordinates=ground_thorax_ty axis=(0 1 0) LinearFunction(coefficients=1 0)
        TransformAxis translation3: coordinates=ground_thorax_tz axis=(0 0 1) LinearFunction(coefficients=1 0)
    CustomJoint sternoclavicular_l: socket_parent_frame=thorax_offset socket_child_frame=clavicle_l_offset
      Coordinate clav_l_prot: default_value=0 range=(-0.7853982 0.7853982) clamped=true
      Coordinate clav_l_elev: default_value=0 range=(-0.7853982 0.7853982) clamped=true
      PhysicalOffsetFrame thorax_offset: socket_parent=/bodyset/thorax translation=(0.006325 0.00693 -0.025465)
          orientation=(3.14159 0 3.14159) [radians]
      PhysicalOffsetFrame clavicle_l_offset: socket_parent=/bodyset/clavicle_l translation=(0 0 0)
      SpatialTransform: axes_held_at_zero=(rotation3 translation1 translation2 translation3)
        TransformAxis rotation1: coordinates=clav_l_prot axis=(0.0153 0.9892987 -0.1451)
            LinearFunction(coefficients=1 0)
        TransformAxis rotation2: coordinates=clav_l_elev axis=(-0.9944725 0 -0.104997) LinearFunction(coefficients=1 0)
    ScapulothoracicJoint scapulothoracic_l: socket_parent_frame=thorax_offset socket_child_frame=scapula_l_offset
        thoracic_ellipsoid_radii_x_y_z=(0.07 0.15 0.07) scapula_winging_axis_origin=(0 0)
        scapula_winging_axis_direction=0 [radians]
      Coordinate scapula_l_abduction: default_value=0 range=(-0.7853982 0.7853982) clamped=true
      Coordinate scapula_l_elevation: default_value=0 range=(-0.7853982 0.7853982) clamped=true
      Coordinate scapula_l_upward_lot: default_value=0 range=(-0.7853982 0.7853982) clamped=true
      Coordinate scapula_l_winging: default_value=0 range=(-0.7853982 0.7853982) clamped=false
      PhysicalOffsetFrame thorax_offset: socket_parent=/bodyset/thorax translation=(-0.02 -0.0173 -0.07)
          orientation=(3.14159 0.87 3.14159)
      PhysicalOffsetFrame scapula_l_offset: socket_parent=/bodyset/scapula_l translation=(-0.05982 -0.03904 -0.056)
          orientation=(-0.5181 -1.1416 -0.2854)
    CustomJoint glenohumeral_l: socket_parent_frame=scapula_l_offset socket_child_frame=humerus_l_offset
      Coordinate shoulder_l_elv: default_value=0.1745329 range=(-1.570796 2.53) clamped=false
      Coordinate plane_of_elev_l: default_value=0 range=(-1.570796 3.141593) clamped=true
      Coordinate axial_lot_l: default_value=0 range=(-3.141593 3.141593) clamped=true
      PhysicalOffsetFrame scapula_l_offset: socket_parent=/bodyset/scapula_l translation=(-0.00955 -0.034 0.009)
      PhysicalOffsetFrame humerus_l_offset: socket_parent=/bodyset/humerus_l translation=(0 0 0)
      SpatialTransform: axes_held_at_zero=(translation1 translation2 translation3)
        TransformAxis rotation1: coordinates=shoulder_l_elv axis=(-0.993 -0.0793 0.0879)
            LinearFunction(coefficients=1 0)
        TransformAxis rotation2: coordinates=plane_of_elev_l axis=(0.0828 0.0654 0.9944)
            LinearFunction(coefficients=1 0)
        TransformAxis rotation3: coordinates=axial_lot_l axis=(-0.0846 0.9947 -0.0584) LinearFunction(coefficients=1 0)
    CustomJoint elbow_l: socket_parent_frame=humerus_l_offset socket_child_frame=ulna_l_offset
      Coordinate elbow_l_flexion: default_value=0 range=(-3.141593 0) clamped=false locked=true
      PhysicalOffsetFrame humerus_l_offset: socket_parent=/bodyset/humerus_l translation=(0.0061 -0.2904 -0.0123)
      PhysicalOffsetFrame ulna_l_offset: socket_parent=/bodyset/ulna_l translation=(0 0 0)
      SpatialTransform: axes_held_at_zero=(rotation1 rotation2 translation1 translation2 translation3)
        TransformAxis rotation3: coordinates=elbow_l_flexion axis=(0.04940001 0.03660001 0.9981083)
            LinearFunction(coefficients=1 0)
    CustomJoint radioulnar_l: socket_parent_frame=ulna_l_offset socket_child_frame=radius_l_offset
      Coordinate pro_sup_l: default_value=1.570796 range=(-1.570796 1.570796) clamped=false locked=true
      PhysicalOffsetFrame ulna_l_offset: socket_parent=/bodyset/ulna_l translation=(0.0004 -0.011503 0.019999)
      PhysicalOffsetFrame radius_l_offset: socket_parent=/bodyset/radius_l translation=(0 0 0)
      SpatialTransform: axes_held_at_zero=(rotation1 rotation3 translation1 translation2 translation3)
        TransformAxis rotation2: coordinates=pro_sup_l axis=(-0.01716099 0.9926656 -0.119668)
            LinearFunction(coefficients=1 0)
    WeldJoint rc_l: socket_parent_frame=radius_l_offset socket_child_frame=hand_l_offset
      PhysicalOffsetFrame radius_l_offset: socket_parent=/bodyset/radius_l translation=(0.018 -0.242 0.025)
      PhysicalOffsetFrame hand_l_offset: socket_parent=/bodyset/hand_l translation=(0 0 0)
  ConstraintSet:
    PointConstraint AC: socket_body_1=/bodyset/clavicle_l socket_body_2=/bodyset/scapula_l
        location_body_1=(-0.02924 0.02024 0.12005) location_body_2=(-0.01357 0.00011 -0.01523)
  ForceSet:
    CoordinateLimitForce [values shared by the 5 below unless stated]: upper_stiffness=20 [N*m/degree]
        lower_stiffness=20 [N*m/degree] damping=1 transition=10 [degrees]
    CoordinateLimitForce ClavicleElevationLimits: coordinate=clav_l_elev upper_limit=25 [degrees]
        lower_limit=-20 [degrees]
    CoordinateLimitForce ClavicleProtractionLimits: coordinate=clav_l_prot upper_limit=25 lower_limit=-10
    CoordinateLimitForce ScapulaRotationLimits: coordinate=scapula_l_upward_lot upper_limit=50 lower_limit=-20
    CoordinateLimitForce ShoulderRotationLimits: coordinate=shoulder_l_elv upper_limit=180 lower_limit=-85
    CoordinateLimitForce ElbowFlexLimit: coordinate=elbow_l_flexion upper_limit=140 lower_limit=0
