# OpenSim document version 40600
Model bsm_body_das_arm:
  gravity: 0 -9.80665 0
  length_units: meters
  force_units: N
  credits:
    1. Rajagopal, A, Dembia, C.L., DeMers, M.S., Delp, D.D., Hicks, J.L., and Delp, S.L. 2. Ajay Seth, Meilin Dong, Ricardo Matias, Scott Delp. Parameters from van der Helm and Klein-Breteler
  publications:
    1. Rajagopal, Apoorva, et al. "Full-Body Musculoskeletal Model for Muscle-Driven Simulation of Human Gait." IEEE Transactions on Biomedical Engineering 63.10 (2016): 2068-2079. (2016) 2. Seth, et al. "Muscle Contributions to Upper-Extremity Movement and Work From a Musculoskeletal Model of the Human Shoulder". Frontiers in Neurorobotics (2019). Parameters from van der Helm 1994, Klein-Breteler et al. 1996.
  Ground
  BodySet:
    Body pelvis: mass=11.777 [kg] mass_center=(-0.0707 0 0) inertia=(0.1028 0.0871 0.0579 0 0 0) meshes=sacrum.obj
      WrapCylinder Gmax1_at_pelvis_r: xyz_body_rotation=(-0.6 0.45 0) translation=(-0.077 -0.099 0.061) quadrant=-x
          radius=0.04 length=0.15
      WrapCylinder Gmax2_at_pelvis_r: xyz_body_rotation=(-0.75 0.39 0) translation=(-0.08 -0.083 0.068) quadrant=all
          radius=0.04 length=0.1
      WrapCylinder Gmax3_at_pelvis_r: xyz_body_rotation=(-0.1 0 0) translation=(-0.083 -0.088 0.068) quadrant=all
          radius=0.04 length=0.1
      WrapCylinder Gmax1_at_pelvis_l: xyz_body_rotation=(0.6 -0.45 0) translation=(-0.077 -0.099 -0.061) quadrant=-x
          radius=0.04 length=0.15
      WrapCylinder Gmax2_at_pelvis_l: xyz_body_rotation=(0.75 -0.39 0) translation=(-0.08 -0.083 -0.068) quadrant=all
          radius=0.04 length=0.1
      WrapCylinder Gmax3_at_pelvis_l: xyz_body_rotation=(0.1 0 0) translation=(-0.083 -0.088 -0.068) quadrant=all
          radius=0.04 length=0.1
      WrapCylinder PS_at_brim_r: xyz_body_rotation=(-0.25 -0.27 0.1) translation=(-0.074 -0.06 0.0656) quadrant=-y
          radius=0.05 length=0.1
      WrapCylinder PS_at_brim_l: xyz_body_rotation=(0.25 0.27 0.1) translation=(-0.074 -0.06 -0.0656) quadrant=-y
          radius=0.05 length=0.1
      WrapCylinder IL_at_brim_r: xyz_body_rotation=(-0.32 -0.24 0.9) translation=(-0.071 -0.065 0.0756) quadrant=-y
          radius=0.0549 length=0.1
      WrapCylinder IL_at_brim_l: xyz_body_rotation=(0.32 0.24 0.9) translation=(-0.071 -0.065 -0.0756) quadrant=-y
          radius=0.0549 length=0.1
    Body lumbar_body: mass=5 mass_center=(0 0 0) inertia=(1 1 1 0 0 0)
      PhysicalOffsetFrame lumbar_mesh_frame: socket_parent=.. translation=(0 0 0) [meters] meshes=lumbar_spine.obj
    Body head: mass=4.0748 mass_center=(0 0.114431 0) inertia=(0.0156867 0.0145504 0.0185882 0 0 0)
      PhysicalOffsetFrame cervical_spine_frame: socket_parent=.. translation=(0.02 -0.5 0) meshes=cervical_spine.obj
    Body thorax: mass=20 mass_center=(0 0 0) inertia=(1 1 1 0 0 0)
      PhysicalOffsetFrame thorax_mesh_frame: socket_parent=.. translation=(0 0 0) meshes=thorax.obj
      Marker c7: .. (-0.0899063 0.0327569 0)
      Marker centijc7: .. (-0.0415 0.0163 0)
      Marker centpxt8: .. (-0.0207 -0.1601 0.0004)
      Marker ij: .. (0 0 0)
      Marker px: .. (0.0697635 -0.164311 0)
      Marker t8: .. (-0.111155 -0.154433 0)
      Marker C7: .. (-0.043 0.031 0)
      Marker CLAV: .. (0.070045 -0.022864 0)
      Marker RITL: .. (0.07418486 -0.02940712 -0.06201666)
      Marker RITR: .. (0.07343857 -0.03423177 0.06795137)
    Body femur_r: mass=9.3014 mass_center=(0 -0.17 0) inertia=(0.1339 0.0351 0.1412 0 0 0) meshes=r_femur.obj
      WrapCylinder Gastroc_at_condyles_r: translation=(0.005 -0.41 0) quadrant=all radius=0.025 length=0.1
      WrapCylinder KnExt_at_fem_r: xyz_body_rotation=(-0.0623366 0.0507601 0)
          translation=(0.00358828 -0.402732 0.00209111) quadrant=all radius=0.025 length=0.1
      WrapCylinder AB_at_femshaft_r: xyz_body_rotation=(1.66157 0.186644 0) translation=(0.0146434 -0.112595 0.023365)
          quadrant=all radius=0.0165 length=0.07
      WrapCylinder AL_at_femshaft_r: xyz_body_rotation=(1.77711 0.136489 0) translation=(0.0307327 -0.231909 0.0151137)
          quadrant=all radius=0.0201 length=0.1
      WrapCylinder AMprox_at_femshaft_r: xyz_body_rotation=(1.61126 0.18656 0)
          translation=(0.00518299 -0.0728948 0.025403) quadrant=all radius=0.0211 length=0.07
      WrapCylinder AMmid_at_femshaft_r: xyz_body_rotation=(1.61139 0.13656 0)
          translation=(0.0230125 -0.160711 0.0205842) quadrant=all radius=0.0214 length=0.12
      WrapCylinder AMdist_at_femshaft_r: xyz_body_rotation=(1.71188 0.186636 0)
          translation=(0.0316065 -0.260736 0.0093646) quadrant=all radius=0.0218 length=0.2
      WrapCylinder AMisch_at_condyles_r: xyz_body_rotation=(1.71115 -0.463363 0)
          translation=(-0.0226511 -0.376831 -0.00315437) quadrant=all radius=0.04 length=0.24
      WrapCylinder PECT_at_femshaft_r: xyz_body_rotation=(1.81295 0.276344 0)
          translation=(0.00608573 -0.0845029 0.0304405) quadrant=all radius=0.015 length=0.05
    Body tibia_r: mass=3.7075 mass_center=(0 -0.1867 0) inertia=(0.0504 0.0051 0.0511 0 0 0) meshes=r_fibula.obj
      WrapCylinder GasLat_at_shank_r: xyz_body_rotation=(2.96723 -0.279725 -1.47812)
          translation=(-0.0074 -0.074 -0.0033) quadrant=-y radius=0.055 length=0.1
      WrapCylinder GasMed_at_shank_r: xyz_body_rotation=(2.96723 0.0279725 -1.47812)
          translation=(-0.0074 -0.074 -0.0033) quadrant=-y radius=0.055 length=0.1
      WrapCylinder GR_at_condyles_r: xyz_body_rotation=(0 -0.4 0) translation=(-0.003 -0.02 0) quadrant=all
          radius=0.036 length=0.1
      WrapCylinder SM_at_condyles_r: xyz_body_rotation=(0 -0.1 0) translation=(-0.001 -0.02 0) quadrant=all
          radius=0.0352 length=0.1
      WrapCylinder ST_at_condyles_r: xyz_body_rotation=(0 -0.2 0) translation=(-0.002 -0.0205 0) quadrant=all
          radius=0.0425 length=0.1
      WrapCylinder BF_at_gastroc_r: translation=(-0.058 -0.06 0) quadrant=y radius=0.03 length=0.15
    Body patella_r: mass=0.0862 mass_center=(0.0018 0.0264 0) inertia=(2.87e-6 1.311e-5 1.311e-5 0 0 0)
        meshes=r_patella.obj
    Body talus_r: mass=0.1 mass_center=(0 0 0) inertia=(0.001 0.001 0.001 0 0 0) meshes=r_talus.obj
    Body calcn_r: mass=1.25 mass_center=(0.1 0.03 0) inertia=(0.0014 0.0039 0.0041 0 0 0) meshes=r_foot.obj
    Body toes_r: mass=0.2166 mass_center=(0.0346 0.006 -0.0175) inertia=(0.0001 0.0002 0.001 0 0 0) meshes=r_bofoot.obj
    Body femur_l: mass=9.3014 mass_center=(0 -0.17 0) inertia=(0.1339 0.0351 0.1412 0 0 0) meshes=l_femur.obj
      WrapCylinder Gastroc_at_condyles_l: translation=(0.005 -0.41 0) quadrant=all radius=0.025 length=0.1
      WrapCylinder KnExt_at_fem_l: xyz_body_rotation=(0.0623366 -0.0507601 0)
          translation=(0.00358828 -0.402732 -0.00209111) quadrant=all radius=0.025 length=0.1
      WrapCylinder AB_at_femshaft_l: xyz_body_rotation=(-1.66157 -0.186644 0)
          translation=(0.0146434 -0.112595 -0.023365) quadrant=all radius=0.0165 length=0.07
      WrapCylinder AL_at_femshaft_l: xyz_body_rotation=(-1.77711 -0.136489 0)
          translation=(0.0307327 -0.231909 -0.0151137) quadrant=all radius=0.0201 length=0.1
      WrapCylinder AMprox_at_femshaft_l: xyz_body_rotation=(-1.61126 -0.18656 0)
          translation=(0.00518299 -0.0728948 -0.025403) quadrant=all radius=0.0211 length=0.07
      WrapCylinder AMmid_at_femshaft_l: xyz_body_rotation=(-1.61139 -0.13656 0)
          translation=(0.0230125 -0.160711 -0.0205842) quadrant=all radius=0.0214 length=0.12
      WrapCylinder AMdist_at_femshaft_l: xyz_body_rotation=(-1.71188 -0.186636 0)
          translation=(0.0316065 -0.260736 -0.0093646) quadrant=all radius=0.0218 length=0.2
      WrapCylinder AMisch_at_condyles_l: xyz_body_rotation=(-1.71115 0.463363 0)
          translation=(-0.0226511 -0.376831 0.00315437) quadrant=all radius=0.04 length=0.24
      WrapCylinder PECT_at_femshaft_l: xyz_body_rotation=(-1.81295 -0.276344 0)
          translation=(0.00608573 -0.0845029 -0.0304405) quadrant=all radius=0.015 length=0.05
    Body tibia_l: mass=3.7075 mass_center=(0 -0.1867 0) inertia=(0.0504 0.0051 0.0511 0 0 0) meshes=l_fibula.obj
      WrapCylinder GasLat_at_shank_l: xyz_body_rotation=(-2.96723 0.279725 -1.47812)
          translation=(-0.0074 -0.074 0.0033) quadrant=-y radius=0.055 length=0.1
      WrapCylinder GasMed_at_shank_l: xyz_body_rotation=(-2.96723 -0.0279725 -1.47812)
          translation=(-0.0074 -0.074 0.0033) quadrant=-y radius=0.055 length=0.1
      WrapCylinder GR_at_condyles_l: xyz_body_rotation=(0 0.4 0) translation=(-0.003 -0.02 0) quadrant=all radius=0.036
          length=0.1
      WrapCylinder SM_at_condyles_l: xyz_body_rotation=(0 0.1 0) translation=(-0.001 -0.02 0) quadrant=all
          radius=0.0352 length=0.1
      WrapCylinder ST_at_condyles_l: xyz_body_rotation=(0 0.2 0) translation=(-0.002 -0.0205 0) quadrant=all
          radius=0.0425 length=0.1
      WrapCylinder BF_at_gastroc_l: translation=(-0.058 -0.06 0) quadrant=all radius=0.03 length=0.15
    Body patella_l: mass=0.0862 mass_center=(0.0018 0.0264 0) inertia=(2.87e-6 1.311e-5 1.311e-5 0 0 0)
        meshes=l_patella.obj
    Body talus_l: mass=0.1 mass_center=(0 0 0) inertia=(0.001 0.001 0.001 0 0 0) meshes=l_talus.obj
    Body calcn_l: mass=1.25 mass_center=(0.1 0.03 0) inertia=(0.0014 0.0039 0.0041 0 0 0) meshes=l_foot.obj
    Body toes_l: mass=0.2166 mass_center=(0.0346 0.006 0.0175) inertia=(0.0001 0.0002 0.001 0 0 0) meshes=l_bofoot.obj
    Body clavicle_1_r: mass=0 mass_center=(0 0 0) inertia=(0 0 0 0 0 0)
    Body clavicle_2_r: mass=0 mass_center=(0 0 0) inertia=(0 0 0 0 0 0)
    Body clavicle_r: mass=0.156 mass_center=(0.0983 0.0167 0.0042)
        inertia=(6.4e-6 2.63e-5 2.43e-5 -6.7e-6 -9.5e-6 2.9e-6) meshes=r_clavicle.obj
    Body scapula_1_r: mass=0 mass_center=(0 0 0) inertia=(0 0 0 0 0 0)
    Body scapula_2_r: mass=0 mass_center=(0 0 0) inertia=(0 0 0 0 0 0)
    Body scapula_r: mass=0.7054 mass_center=(-0.053 -0.0229 -0.0247) inertia=(0.001 0.001 0.001 0 0 0)
        meshes=r_scapula.obj
    Body humerus_1_r: mass=0 mass_center=(0 0 0) inertia=(0 0 0 0 0 0)
    Body humerus_2_r: mass=0 mass_center=(0 0 0) inertia=(0 0 0 0 0 0)
    Body humerus_r: mass=2.0519 mass_center=(0.0064 -0.0776 -0.0036) inertia=(0.0132 0.001988 0.0132 0 0 0)
        meshes=r_humerus.obj
      WrapSphere deltoid: xyz_body_rotation=(-0.193033 -0.238063 -0.385718) translation=(0.0022 -0.0009 -0.0018)
          quadrant=all radius=0.0272
      WrapSphere inf_sup_sub: xyz_body_rotation=(-0.193033 -0.238063 -0.385718) translation=(-0.0017 0.0018 -0.0013)
          quadrant=all radius=0.0231
      WrapCylinder infra_cyl: xyz_body_rotation=(1.56643 0.00610865 -0.953124) translation=(0.0054 -0.023 -0.0044)
          quadrant=-x radius=0.014 length=0.12
      WrapCylinder ter_min_cyl: xyz_body_rotation=(1.56643 0.00610865 -1.47672) translation=(0.0054 -0.023 -0.0044)
          quadrant=-x radius=0.015 length=0.1
      WrapCylinder ter_lat_pec: xyz_body_rotation=(1.56643 0.00610865 -0.953124) translation=(0.0057 -0.073 -0.0042)
          quadrant=all radius=0.01 length=0.1
    Body ulna_r: mass=0.5464 mass_center=(-0.0003 -0.0634 -0.0039) inertia=(0.0030585 0.00045325 0.0030585 0 0 0)
        meshes=r_ulna.obj
      WrapCylinder elbow: xyz_body_rotation=(-2.51153 1.54654 2.79253) translation=(0 0 0) quadrant=y radius=0.019
          length=0.05
      WrapCylinder elbow_circ: xyz_body_rotation=(0.630064 -1.54654 0) translation=(0 0 0) quadrant=all radius=0.015
          length=0.05
      WrapCylinder pron_quad: xyz_body_rotation=(-1.28805 -0.232652 0) translation=(0.0365 -0.2064 -0.0577) quadrant=y
          radius=0.007 length=0.1
    Body radius_r: mass=0.5464 mass_center=(0.0106 -0.1179 -0.0129) inertia=(0.0030585 0.00045325 0.0030585 0 0 0)
        meshes=r_radius.obj
      WrapCylinder radius: xyz_body_rotation=(-1.61286 -0.202284 -1.77709) translation=(0.0035 -0.0322 -0.0003)
          quadrant=-x radius=0.0092 length=0.2
      WrapCylinder supinator: xyz_body_rotation=(-1.48877 0.00174533 0) translation=(0.0034 -0.1196 -0.0069)
          quadrant=-y radius=0.009 length=0.2
      WrapCylinder ulna_radius: xyz_body_rotation=(1.54095 0.256214 2.67035) translation=(0.0146 -0.0891 0.0003)
          quadrant=-x radius=0.0071 length=0.1
    Body hand_r: mass=0.525 mass_center=(0.0006 -0.0905 -0.0365) inertia=(0.0006387 0.0001904 0.0006387 0 0 0)
        meshes=r_hand.obj
    Body clavicle_1_l: mass=0 mass_center=(0 0 0) inertia=(0 0 0 0 0 0)
    Body clavicle_2_l: mass=0 mass_center=(0 0 0) inertia=(0 0 0 0 0 0)
    Body clavicle_l: mass=0.156 mass_center=(-0.0983 0.0167 0.0042)
        inertia=(6.4e-6 2.63e-5 2.43e-5 -6.7e-6 -9.5e-6 2.9e-6) meshes=l_clavicle.obj
    Body scapula_1_l: mass=0 mass_center=(0 0 0) inertia=(0 0 0 0 0 0)
    Body scapula_2_l: mass=0 mass_center=(0 0 0) inertia=(0 0 0 0 0 0)
    Body scapula_l: mass=0.7054 mass_center=(0.053 -0.0229 -0.0247) inertia=(0.001 0.001 0.001 0 0 0)
        meshes=l_scapula.obj
    Body humerus_1_l: mass=0 mass_center=(0 0 0) inertia=(0 0 0 0 0 0)
    Body humerus_2_l: mass=0 mass_center=(0 0 0) inertia=(0 0 0 0 0 0)
    Body humerus_l: mass=2.0519 mass_center=(-0.0064 -0.0776 -0.0036) inertia=(0.0132 0.001988 0.0132 0 0 0)
        meshes=l_humerus.obj
      WrapSphere deltoid: xyz_body_rotation=(-0.193033 -0.238063 -0.385718) translation=(0.0022 -0.0009 -0.0018)
          quadrant=all radius=0.0272
      WrapSphere inf_sup_sub: xyz_body_rotation=(-0.193033 -0.238063 -0.385718) translation=(-0.0017 0.0018 -0.0013)
          quadrant=all radius=0.0231
      WrapCylinder infra_cyl: xyz_body_rotation=(1.56643 0.00610865 -0.953124) translation=(0.0054 -0.023 -0.0044)
          quadrant=-x radius=0.014 length=0.12
      WrapCylinder ter_min_cyl: xyz_body_rotation=(1.56643 0.00610865 -1.47672) translation=(0.0054 -0.023 -0.0044)
          quadrant=-x radius=0.015 length=0.1
      WrapCylinder ter_lat_pec: xyz_body_rotation=(1.56643 0.00610865 -0.953124) translation=(0.0057 -0.073 -0.0042)
          quadrant=all radius=0.01 length=0.1
    Body ulna_l: mass=0.5464 mass_center=(0.0003 -0.0634 -0.0039) inertia=(0.0030585 0.00045325 0.0030585 0 0 0)
        meshes=l_ulna.obj
      WrapCylinder elbow: xyz_body_rotation=(-2.51153 1.54654 2.79253) translation=(0 0 0) quadrant=y radius=0.019
          length=0.05
      WrapCylinder elbow_circ: xyz_body_rotation=(0.630064 -1.54654 0) translation=(0 0 0) quadrant=all radius=0.015
          length=0.05
      WrapCylinder pron_quad: xyz_body_rotation=(-1.28805 -0.232652 0) translation=(0.0365 -0.2064 -0.0577) quadrant=y
          radius=0.007 length=0.1
    Body radius_l: mass=0.5464 mass_center=(-0.0106 -0.1179 -0.0129) inertia=(0.0030585 0.00045325 0.0030585 0 0 0)
        meshes=r_radius.obj
      WrapCylinder radius: xyz_body_rotation=(-1.61286 -0.202284 -1.77709) translation=(0.0035 -0.0322 -0.0003)
          quadrant=-x radius=0.0092 length=0.2
      WrapCylinder supinator: xyz_body_rotation=(-1.48877 0.00174533 0) translation=(0.0034 -0.1196 -0.0069)
          quadrant=-y radius=0.009 length=0.2
      WrapCylinder ulna_radius: xyz_body_rotation=(1.54095 0.256214 2.67035) translation=(0.0146 -0.0891 0.0003)
          quadrant=-x radius=0.0071 length=0.1
    Body hand_l: mass=0.525 mass_center=(0.0006 -0.0905 -0.0365) inertia=(0.0006387 0.0001904 0.0006387 0 0 0)
        meshes=l_hand.obj
  JointSet:
    CustomJoint ground_pelvis: socket_parent_frame=ground_offset socket_child_frame=pelvis_offset
      Coordinate pelvis_tilt: default_value=0 range=(-3.141593 3.141593) clamped=true
      Coordinate pelvis_list: default_value=0 range=(-3.141593 3.141593) clamped=true
      Coordinate pelvis_rotation: default_value=0 range=(-3.141593 3.141593) clamped=true
      Coordinate pelvis_tx: default_value=0 range=(-500 500) clamped=true
      Coordinate pelvis_ty: default_value=0.94 range=(-5 20) clamped=true
      Coordinate pelvis_tz: default_value=0 range=(-500 500) clamped=true
      PhysicalOffsetFrame ground_offset: socket_parent=/ground translation=(0 0 0)
      PhysicalOffsetFrame pelvis_offset: socket_parent=/bodyset/pelvis translation=(0 0 0)
      SpatialTransform:
        TransformAxis rotation1: coordinates=pelvis_tilt axis=(0 0 1) LinearFunction(coefficients=1 0)
        TransformAxis rotation2: coordinates=pelvis_list axis=(1 0 0) LinearFunction(coefficients=1 0)
        TransformAxis rotation3: coordinates=pelvis_rotation axis=(0 1 0) LinearFunction(coefficients=1 0)
        TransformAxis translation1: coordinates=pelvis_tx axis=(1 0 0) LinearFunction(coefficients=1 0)
        TransformAxis translation2: coordinates=pelvis_ty axis=(0 1 0) LinearFunction(coefficients=1 0)
        TransformAxis translation3: coordinates=pelvis_tz axis=(0 0 1) LinearFunction(coefficients=1 0)
    ConstantCurvatureJoint lumbar: socket_parent_frame=pelvis_offset socket_child_frame=lumbar_offset
        neutral_angle_x_z_y=(0 0.7 0) length=0.1
      Coordinate lumbar_bending: default_value=0 range=(-1.13 1.13) clamped=true
      Coordinate lumbar_extension: default_value=-5.563363e-9 range=(-1.13 0.524) clamped=true
      Coordinate lumbar_twist: default_value=0 range=(-0.26 0.26) clamped=true
      PhysicalOffsetFrame pelvis_offset: socket_parent=/bodyset/pelvis translation=(-0.1007 0.0615 0)
          orientation=(0 0 -0.3) [radians]
      PhysicalOffsetFrame lumbar_offset: socket_parent=/bodyset/lumbar_body translation=(0 0 0)
    ConstantCurvatureJoint thoracic_spine: socket_parent_frame=thoracic_lumbar_offset
        socket_child_frame=thoracic_thorax_offset neutral_angle_x_z_y=(0 -0.6 0) length=0.3
      Coordinate thorax_bending: default_value=0 range=(-0.52 0.52) clamped=true
      Coordinate thorax_extension: default_value=-2.96038e-9 range=(-0.45 0.36) clamped=true
      Coordinate thorax_twist: default_value=0 range=(-0.82 0.82) clamped=true
      PhysicalOffsetFrame thoracic_lumbar_offset: socket_parent=/bodyset/lumbar_body translation=(0 0 0)
      PhysicalOffsetFrame thoracic_thorax_offset: socket_parent=/bodyset/thorax translation=(0 0 0)
          orientation=(0 0 -0.3)
    ConstantCurvatureJoint neck: socket_parent_frame=torso_offset socket_child_frame=neck_offset
        neutral_angle_x_z_y=(0 0.2 0) length=0.1
      Coordinate head_bending: default_value=0 range=(-1.01 1.01) clamped=true
      Coordinate head_extension: default_value=0 range=(-1.09 1.09) clamped=true
      Coordinate head_twist: default_value=0 range=(-1.44 1.44) clamped=true
      PhysicalOffsetFrame torso_offset: socket_parent=/bodyset/thorax translation=(0 0 0) orientation=(0 0 -0.3)
      PhysicalOffsetFrame neck_offset: socket_parent=/bodyset/head translation=(0 0 0)
    CustomJoint sc1_l: socket_parent_frame=thorax_offset socket_child_frame=clavicle_1_l_offset
      Coordinate SC_l_y: default_value=0.5844408 range=(0.3316 1.1345) clamped=false
      PhysicalOffsetFrame thorax_offset: socket_parent=/bodyset/thorax translation=(0.05 -0.0152 0.0028)
          orientation=(0 -1.570796 0)
      PhysicalOffsetFrame clavicle_1_l_offset: socket_parent=/bodyset/clavicle_1_l translation=(0 0 0)
      SpatialTransform: axes_held_at_zero=(rotation2 rotation3 translation1 translation2 translation3)
        TransformAxis rotation1: coordinates=SC_l_y axis=(0 1 0) LinearFunction(coefficients=1 0)
    CustomJoint sc2_l: socket_parent_frame=clavicle_1_l_offset socket_child_frame=clavicle_2_l_offset
      Coordinate SC_l_z: default_value=-0.0873 range=(-0.5236 -0.0873) clamped=false
      PhysicalOffsetFrame clavicle_1_l_offset: socket_parent=/bodyset/clavicle_1_l translation=(0 0 0)
      PhysicalOffsetFrame clavicle_2_l_offset: socket_parent=/bodyset/clavicle_2_l translation=(0 0 0)
      SpatialTransform: axes_held_at_zero=(rotation1 rotation3 translation1 translation2 translation3)
        TransformAxis rotation2: coordinates=SC_l_z axis=(0 0 1) LinearFunction(coefficients=1 0)
    CustomJoint sc3_l: socket_parent_frame=clavicle_2_l_offset socket_child_frame=clavicle_l_offset
      Coordinate SC_l_x: default_value=0.5744638 range=(0 1.4486) clamped=false
      PhysicalOffsetFrame clavicle_2_l_offset: socket_parent=/bodyset/clavicle_2_l translation=(0 0 0)
      PhysicalOffsetFrame clavicle_l_offset: socket_parent=/bodyset/clavicle_l translation=(0 0 0)
      SpatialTransform: axes_held_at_zero=(rotation1 rotation2 translation1 translation2 translation3)
        TransformAxis rotation3: coordinates=SC_l_x axis=(1 0 0) LinearFunction(coefficients=1 0)
    CustomJoint ac1_l: socket_parent_frame=clavicle_l_offset socket_child_frame=scapula_1_l_offset
      Coordinate AC_l_y: default_value=-0.7953626 range=(-1.2043 -0.576) clamped=false
      PhysicalOffsetFrame clavicle_l_offset: socket_parent=/bodyset/clavicle_l translation=(-0.2077 -0.0001 0.0282)
      PhysicalOffsetFrame scapula_1_l_offset: socket_parent=/bodyset/scapula_1_l translation=(0 0 0)
      SpatialTransform: axes_held_at_zero=(rotation2 rotation3 translation1 translation2 translation3)
        TransformAxis rotation1: coordinates=AC_l_y axis=(0 1 0) LinearFunction(coefficients=1 0)
    CustomJoint ac2_l: socket_parent_frame=scapula_1_l_offset socket_child_frame=scapula_2_l_offset
      Coordinate scapula_elevation_l: default_value=-0.00799797 range=(-0.3491 0.3819) clamped=false
      PhysicalOffsetFrame scapula_1_l_offset: socket_parent=/bodyset/scapula_1_l translation=(0 0 0)
      PhysicalOffsetFrame scapula_2_l_offset: socket_parent=/bodyset/scapula_2_l translation=(0 0 0)
      SpatialTransform: axes_held_at_zero=(rotation1 rotation3 translation1 translation2 translation3)
        TransformAxis rotation2: coordinates=scapula_elevation_l axis=(0 0 1) LinearFunction(coefficients=1 0)
    CustomJoint ac3_l: socket_parent_frame=scapula_2_l_offset socket_child_frame=scapula_l_offset
      Coordinate scapula_upward_rot_l: default_value=-0.2105165 range=(-0.2967 0.3142) clamped=false
      PhysicalOffsetFrame scapula_2_l_offset: socket_parent=/bodyset/scapula_2_l translation=(0 0 0)
      PhysicalOffsetFrame scapula_l_offset: socket_parent=/bodyset/scapula_l translation=(0 0 0)
      SpatialTransform: axes_held_at_zero=(rotation1 rotation2 translation1 translation2 translation3)
        TransformAxis rotation3: coordinates=scapula_upward_rot_l axis=(1 0 0) LinearFunction(coefficients=1 0)
    CustomJoint gh1_l: socket_parent_frame=scapula_l_offset socket_child_frame=humerus_1_l_offset
      Coordinate shoulder_l_x: default_value=0.7655775 range=(-2.9671 3.0543) clamped=false
      PhysicalOffsetFrame scapula_l_offset: socket_parent=/bodyset/scapula_l translation=(-0.002 -0.023 -0.0439)
      PhysicalOffsetFrame humerus_1_l_offset: socket_parent=/bodyset/humerus_1_l translation=(0 0 0)
      SpatialTransform: axes_held_at_zero=(rotation1 rotation3 translation1 translation2 translation3)
        TransformAxis rotation2: coordinates=shoulder_l_x axis=(0 1 0) LinearFunction(coefficients=1 0)
    CustomJoint gh2_l: socket_parent_frame=humerus_1_l_offset socket_child_frame=humerus_2_l_offset
      Coordinate shoulder_l_z: default_value=0.00379958 range=(-1.4661 0.5236) clamped=false
      PhysicalOffsetFrame humerus_1_l_offset: socket_parent=/bodyset/humerus_1_l translation=(0 0 0)
      PhysicalOffsetFrame humerus_2_l_offset: socket_parent=/bodyset/humerus_2_l translation=(0 0 0)
      SpatialTransform: axes_held_at_zero=(rotation1 rotation2 translation1 translation2 translation3)
        TransformAxis rotation3: coordinates=shoulder_l_z axis=(0 0 1) LinearFunction(coefficients=1 0)
    CustomJoint gh3_l: socket_parent_frame=humerus_2_l_offset socket_child_frame=humerus_l_offset
      Coordinate shoulder_l_xy: default_value=-0.6049077 range=(-3.0892 3.1241) clamped=false
      PhysicalOffsetFrame humerus_2_l_offset: socket_parent=/bodyset/humerus_2_l translation=(0 0 0)
      PhysicalOffsetFrame humerus_l_offset: socket_parent=/bodyset/humerus_l translation=(0 0 0)
      SpatialTransform: axes_held_at_zero=(rotation1 rotation3 translation1 translation2 translation3)
        TransformAxis rotation2: coordinates=shoulder_l_xy axis=(0 1 0) LinearFunction(coefficients=1 0)
    CustomJoint hu_l: socket_parent_frame=humerus_l_offset socket_child_frame=ulna_l_offset
      Coordinate elbow_flexion_l: default_value=0.08726646 range=(0.08726646 2.443461) clamped=false
      PhysicalOffsetFrame humerus_l_offset: socket_parent=/bodyset/humerus_l translation=(-0.0058 -0.2907 -0.0049)
      PhysicalOffsetFrame ulna_l_offset: socket_parent=/bodyset/ulna_l translation=(0 0 0)
      SpatialTransform: axes_held_at_zero=(rotation2 rotation3 translation1 translation2 translation3)
        TransformAxis rotation1: coordinates=elbow_flexion_l axis=(0.9997661 0.008446 -0.019909)
            LinearFunction(coefficients=1 0)
    CustomJoint ur_l: socket_parent_frame=ulna_l_offset socket_child_frame=radius_l_offset
      Coordinate pro_sup_l: default_value=0.08726646 range=(0.08726646 2.792527) clamped=false
      PhysicalOffsetFrame ulna_l_offset: socket_parent=/bodyset/ulna_l translation=(-0.0171 -0.0133 -0.0163)
      PhysicalOffsetFrame radius_l_offset: socket_parent=/bodyset/radius_l translation=(0 0 0)
      SpatialTransform: axes_held_at_zero=(rotation2 rotation3 translation1 translation2 translation3)
        TransformAxis rotation1: coordinates=pro_sup_l axis=(-0.113295 0.9740588 0.195892)
            LinearFunction(coefficients=1 0)
    WeldJoint rc_l: socket_parent_frame=radius_l_offset socket_child_frame=hand_l_offset
      PhysicalOffsetFrame radius_l_offset: socket_parent=/bodyset/radius_l translation=(-0.0169 -0.2251 -0.0712)
      PhysicalOffsetFrame hand_l_offset: socket_parent=/bodyset/hand_l translation=(0 0 0)
    CustomJoint sc1_r: socket_parent_frame=thorax_offset socket_child_frame=clavicle_1_r_offset
      Coordinate scapula_abduction_r: default_value=-0.5844408 range=(-1.1345 -0.3316) clamped=false
      PhysicalOffsetFrame thorax_offset: socket_parent=/bodyset/thorax translation=(0.05 -0.0152 0.0028)
          orientation=(0 -1.570796 0)
      PhysicalOffsetFrame clavicle_1_r_offset: socket_parent=/bodyset/clavicle_1_r translation=(0 0 0)
      SpatialTransform: axes_held_at_zero=(rotation2 rotation3 translation1 translation2 translation3)
        TransformAxis rotation1: coordinates=scapula_abduction_r axis=(0 1 0) LinearFunction(coefficients=1 0)
    CustomJoint sc2_r: socket_parent_frame=clavicle_1_r_offset socket_child_frame=clavicle_2_r_offset
      Coordinate SC_r_z: default_value=0.0873 range=(0.0873 0.5236) clamped=false
      PhysicalOffsetFrame clavicle_1_r_offset: socket_parent=/bodyset/clavicle_1_r translation=(0 0 0)
      PhysicalOffsetFrame clavicle_2_r_offset: socket_parent=/bodyset/clavicle_2_r translation=(0 0 0)
      SpatialTransform: axes_held_at_zero=(rotation1 rotation3 translation1 translation2 translation3)
        TransformAxis rotation2: coordinates=SC_r_z axis=(0 0 1) LinearFunction(coefficients=1 0)
    CustomJoint sc3_r: socket_parent_frame=clavicle_2_r_offset socket_child_frame=clavicle_r_offset
      Coordinate SC_r_x: default_value=0.5744638 range=(0 1.4486) clamped=false
      PhysicalOffsetFrame clavicle_2_r_offset: socket_parent=/bodyset/clavicle_2_r translation=(0 0 0)
      PhysicalOffsetFrame clavicle_r_offset: socket_parent=/bodyset/clavicle_r translation=(0 0 0)
      SpatialTransform: axes_held_at_zero=(rotation1 rotation2 translation1 translation2 translation3)
        TransformAxis rotation3: coordinates=SC_r_x axis=(1 0 0) LinearFunction(coefficients=1 0)
    CustomJoint ac1_r: socket_parent_frame=clavicle_r_offset socket_child_frame=scapula_1_r_offset
      Coordinate AC_r_y: default_value=0.7953626 range=(0.576 1.2043) clamped=false
      PhysicalOffsetFrame clavicle_r_offset: socket_parent=/bodyset/clavicle_r translation=(0.2077 -0.0001 0.0282)
      PhysicalOffsetFrame scapula_1_r_offset: socket_parent=/bodyset/scapula_1_r translation=(0 0 0)
      SpatialTransform: axes_held_at_zero=(rotation2 rotation3 translation1 translation2 translation3)
        TransformAxis rotation1: coordinates=AC_r_y axis=(0 1 0) LinearFunction(coefficients=1 0)
    CustomJoint ac2_r: socket_parent_frame=scapula_1_r_offset socket_child_frame=scapula_2_r_offset
      Coordinate scapula_elevation_r: default_value=0.00799797 range=(-0.3819 0.3491) clamped=false
      PhysicalOffsetFrame scapula_1_r_offset: socket_parent=/bodyset/scapula_1_r translation=(0 0 0)
      PhysicalOffsetFrame scapula_2_r_offset: socket_parent=/bodyset/scapula_2_r translation=(0 0 0)
      SpatialTransform: axes_held_at_zero=(rotation1 rotation3 translation1 translation2 translation3)
        TransformAxis rotation2: coordinates=scapula_elevation_r axis=(0 0 1) LinearFunction(coefficients=1 0)
    CustomJoint ac3_r: socket_parent_frame=scapula_2_r_offset socket_child_frame=scapula_r_offset
      Coordinate scapula_upward_rot_r: default_value=-0.2105165 range=(-0.2967 0.3142) clamped=false
      PhysicalOffsetFrame scapula_2_r_offset: socket_parent=/bodyset/scapula_2_r translation=(0 0 0)
      PhysicalOffsetFrame scapula_r_offset: socket_parent=/bodyset/scapula_r translation=(0 0 0)
      SpatialTransform: axes_held_at_zero=(rotation1 rotation2 translation1 translation2 translation3)
        TransformAxis rotation3: coordinates=scapula_upward_rot_r axis=(1 0 0) LinearFunction(coefficients=1 0)
    CustomJoint gh1_r: socket_parent_frame=scapula_r_offset socket_child_frame=humerus_1_r_offset
      Coordinate shoulder_r_x: default_value=0.7655775 range=(-2.9671 3.0543) clamped=false
      PhysicalOffsetFrame scapula_r_offset: socket_parent=/bodyset/scapula_r translation=(0.002 -0.023 -0.0439)
      PhysicalOffsetFrame humerus_1_r_offset: socket_parent=/bodyset/humerus_1_r translation=(0 0 0)
      SpatialTransform: axes_held_at_zero=(rotation1 rotation3 translation1 translation2 translation3)
        TransformAxis rotation2: coordinates=shoulder_r_x axis=(0 1 0) LinearFunction(coefficients=1 0)
    CustomJoint gh2_r: socket_parent_frame=humerus_1_r_offset socket_child_frame=humerus_2_r_offset
      Coordinate shoulder_r_z: default_value=-0.00379958 range=(-0.5236 1.4661) clamped=false
      PhysicalOffsetFrame humerus_1_r_offset: socket_parent=/bodyset/humerus_1_r translation=(0 0 0)
      PhysicalOffsetFrame humerus_2_r_offset: socket_parent=/bodyset/humerus_2_r translation=(0 0 0)
      SpatialTransform: axes_held_at_zero=(rotation1 rotation2 translation1 translation2 translation3)
        TransformAxis rotation3: coordinates=shoulder_r_z axis=(0 0 1) LinearFunction(coefficients=1 0)
    CustomJoint gh3_r: socket_parent_frame=humerus_2_r_offset socket_child_frame=humerus_r_offset
      Coordinate shoulder_r_xy: default_value=-0.6049077 range=(-3.0892 3.1241) clamped=false
      PhysicalOffsetFrame humerus_2_r_offset: socket_parent=/bodyset/humerus_2_r translation=(0 0 0)
      PhysicalOffsetFrame humerus_r_offset: socket_parent=/bodyset/humerus_r translation=(0 0 0)
      SpatialTransform: axes_held_at_zero=(rotation1 rotation3 translation1 translation2 translation3)
        TransformAxis rotation2: coordinates=shoulder_r_xy axis=(0 1 0) LinearFunction(coefficients=1 0)
    CustomJoint hu_r: socket_parent_frame=humerus_r_offset socket_child_frame=ulna_r_offset
      Coordinate elbow_flexion_r: default_value=0.08726646 range=(0.08726646 2.443461) clamped=false
      PhysicalOffsetFrame humerus_r_offset: socket_parent=/bodyset/humerus_r translation=(0.0058 -0.2907 0.0049)
      PhysicalOffsetFrame ulna_r_offset: socket_parent=/bodyset/ulna_r translation=(0 0 0)
      SpatialTransform: axes_held_at_zero=(rotation2 rotation3 translation1 translation2 translation3)
        TransformAxis rotation1: coordinates=elbow_flexion_r axis=(0.9997661 0.008446 -0.019909)
            LinearFunction(coefficients=1 0)
    CustomJoint ur_r: socket_parent_frame=ulna_r_offset socket_child_frame=radius_r_offset
      Coordinate pro_sup_r: default_value=0.08726646 range=(0.08726646 2.792527) clamped=false
      PhysicalOffsetFrame ulna_r_offset: socket_parent=/bodyset/ulna_r translation=(0.0171 -0.0133 -0.0163)
      PhysicalOffsetFrame radius_r_offset: socket_parent=/bodyset/radius_r translation=(0 0 0)
      SpatialTransform: axes_held_at_zero=(rotation2 rotation3 translation1 translation2 translation3)
        TransformAxis rotation1: coordinates=pro_sup_r axis=(-0.113295 0.9740588 0.195892)
            LinearFunction(coefficients=1 0)
    WeldJoint rc_r: socket_parent_frame=radius_r_offset socket_child_frame=hand_r_offset
      PhysicalOffsetFrame radius_r_offset: socket_parent=/bodyset/radius_r translation=(0.0169 -0.2251 -0.0712)
      PhysicalOffsetFrame hand_r_offset: socket_parent=/bodyset/hand_r translation=(0 0 0)
    CustomJoint hip_r: socket_parent_frame=pelvis_offset socket_child_frame=femur_r_offset
      Coordinate hip_flexion_r: default_value=8.229276e-9 range=(-0.5235988 2.094395) clamped=true
      Coordinate hip_adduction_r: default_value=-4.050378e-9 range=(-0.8726646 0.5235988) clamped=true
      Coordinate hip_rotation_r: default_value=0 range=(-0.6981317 0.6981317) clamped=true
      PhysicalOffsetFrame pelvis_offset: socket_parent=/bodyset/pelvis translation=(-0.056276 -0.07849 0.07726)
      PhysicalOffsetFrame femur_r_offset: socket_parent=/bodyset/femur_r translation=(0 0 0)
      SpatialTransform: axes_held_at_zero=(translation1 translation2 translation3)
        TransformAxis rotation1: coordinates=hip_flexion_r axis=(0 0 1) LinearFunction(coefficients=1 0)
        TransformAxis rotation2: coordinates=hip_adduction_r axis=(1 0 0) LinearFunction(coefficients=1 0)
        TransformAxis rotation3: coordinates=hip_rotation_r axis=(0 1 0) LinearFunction(coefficients=1 0)
    CustomJoint walker_knee_r: socket_parent_frame=femur_r_offset socket_child_frame=tibia_r_offset
      Coordinate knee_angle_r: default_value=0.0001047757 range=(0 2.9) clamped=true
      PhysicalOffsetFrame femur_r_offset: socket_parent=/bodyset/femur_r translation=(-0.00809 -0.40796 -0.00275)
          orientation=(-1.64157 1.44618 1.5708)
      PhysicalOffsetFrame tibia_r_offset: socket_parent=/bodyset/tibia_r
          translation=(-0.00808954 -0.0035348 -0.00148474) orientation=(-1.64157 1.44618 1.5708)
      SpatialTransform: axes_held_at_zero=translation3
        TransformAxis rotation1: coordinates=knee_angle_r axis=(1 0 0) LinearFunction(coefficients=1 0)
        TransformAxis rotation2: coordinates=knee_angle_r axis=(0 0 1)
          SimmSpline: x=(0 0.174533 0.349066 0.523599 0.698132 0.872665 1.0472 1.22173 1.39626 1.5708 1.74533 1.91986 2.0944)
              y=(0 0.0126809 0.0226969 0.0296054 0.0332049 0.0335354 0.0308779 0.0257548 0.0189295 0.011407 0.00443314 -0.00050475 -0.0016782)
        TransformAxis rotation3: coordinates=knee_angle_r axis=(0 1 0)
          SimmSpline: x=(0 0.174533 0.349066 0.523599 0.698132 0.872665 1.0472 1.22173 1.39626 1.5708 1.74533 1.91986 2.0944)
              y=(0 0.059461 0.109399 0.150618 0.18392 0.210107 0.229983 0.24435 0.254012 0.25977 0.262428 0.262788 0.261654)
        TransformAxis translation1: coordinates=knee_angle_r axis=(0 1 0)
          SimmSpline: x=(0 0.174533 0.349066 0.523599 0.698132 0.872665 1.0472 1.22173 1.39626 1.5708 1.74533 1.91986 2.0944)
              y=(0 0.000479 0.000835 0.001086 0.001251 0.001346 0.001391 0.001403 0.0014 0.0014 0.001421 0.001481 0.001599)
        TransformAxis translation2: coordinates=knee_angle_r axis=(0 0 1)
          SimmSpline: x=(0 0.174533 0.349066 0.523599 0.698132 0.872665 1.0472 1.22173 1.39626 1.5708 1.74533 1.91986 2.0944)
              y=(0 0.000988 0.001899 0.002734 0.003492 0.004173 0.004777 0.005305 0.005756 0.00613 0.006427 0.006648 0.006792)
    CustomJoint patellofemoral_r: socket_parent_frame=femur_r_offset socket_child_frame=patella_r_offset
      Coordinate knee_angle_r_beta: default_value=0.0001047757 range=(-99999.9 99999.9) clamped=false
      PhysicalOffsetFrame femur_r_offset: socket_parent=/bodyset/femur_r translation=(-0.00809 -0.40796 -0.00275)
      PhysicalOffsetFrame patella_r_offset: socket_parent=/bodyset/patella_r translation=(0 0 0)
      SpatialTransform: axes_held_at_zero=(rotation2 rotation3)
        TransformAxis rotation1: coordinates=knee_angle_r_beta axis=(0 0 1)
          SimmSpline: x=(0 0.174533 0.349066 0.523599 0.698132 0.872665 1.0472 1.22173 1.39626 1.5708 1.74533 1.91986 2.0944)
              y=(0.00113686 -0.00629212 -0.105582 -0.253683 -0.414245 -0.579047 -0.747244 -0.91799 -1.09044 -1.26379 -1.43763 -1.61186 -1.78634)
        TransformAxis translation1: coordinates=knee_angle_r_beta axis=(1 0 0)
          SimmSpline: x=(0 0.174533 0.349066 0.523599 0.698132 0.872665 1.0472 1.22173 1.39626 1.5708 1.74533 1.91986 2.0944)
              y=(0.0524 0.0488 0.0437 0.0371 0.0296 0.0216 0.0136 0.0057 -0.0019 -0.0088 -0.0148 -0.0196 -0.0227)
        TransformAxis translation2: coordinates=knee_angle_r_beta axis=(0 1 0)
          SimmSpline: x=(0 0.174533 0.349066 0.523599 0.698132 0.872665 1.0472 1.22173 1.39626 1.5708 1.74533 1.91986 2.0944)
              y=(-0.0108 -0.019 -0.0263 -0.0322 -0.0367 -0.0395 -0.0408 -0.0404 -0.0384 -0.0349 -0.0301 -0.0245 -0.0187)
        TransformAxis translation3: axis=(0 0 1) Constant(value=0.00275)
    PinJoint ankle_r: socket_parent_frame=tibia_r_offset socket_child_frame=talus_r_offset
      Coordinate ankle_angle_r: default_value=-2.486443e-9 range=(-0.6981317 0.5235988) clamped=true
      PhysicalOffsetFrame tibia_r_offset: socket_parent=/bodyset/tibia_r translation=(-0.01 -0.4 0)
          orientation=(0.175895 -0.105208 0.0186622)
      PhysicalOffsetFrame talus_r_offset: socket_parent=/bodyset/talus_r translation=(0 0 0)
          orientation=(0.175895 -0.105208 0.0186622)
    PinJoint subtalar_r: socket_parent_frame=talus_r_offset socket_child_frame=calcn_r_offset
      Coordinate subtalar_angle_r: default_value=0 range=(-0.3490659 0.3490659) clamped=true
      PhysicalOffsetFrame talus_r_offset: socket_parent=/bodyset/talus_r translation=(-0.04877 -0.04195 0.00792)
          orientation=(-1.76819 0.906223 1.8196)
      PhysicalOffsetFrame calcn_r_offset: socket_parent=/bodyset/calcn_r translation=(0 0 0)
          orientation=(-1.76819 0.906223 1.8196)
    PinJoint mtp_r: socket_parent_frame=calcn_r_offset socket_child_frame=toes_r_offset
      Coordinate mtp_angle_r: default_value=0 range=(-0.5235988 0.5235988) clamped=true
      PhysicalOffsetFrame calcn_r_offset: socket_parent=/bodyset/calcn_r translation=(0.1788 -0.002 0.00108)
          orientation=(-3.14159 0.619901 0)
      PhysicalOffsetFrame toes_r_offset: socket_parent=/bodyset/toes_r translation=(0 0 0)
          orientation=(-3.14159 0.619901 0)
    CustomJoint hip_l: socket_parent_frame=pelvis_offset socket_child_frame=femur_l_offset
      Coordinate hip_flexion_l: default_value=8.229276e-9 range=(-0.5235988 2.094395) clamped=true
      Coordinate hip_adduction_l: default_value=-4.050378e-9 range=(-0.8726646 0.5235988) clamped=true
      Coordinate hip_rotation_l: default_value=0 range=(-0.6981317 0.6981317) clamped=true
      PhysicalOffsetFrame pelvis_offset: socket_parent=/bodyset/pelvis translation=(-0.056276 -0.07849 -0.07726)
      PhysicalOffsetFrame femur_l_offset: socket_parent=/bodyset/femur_l translation=(0 0 0)
      SpatialTransform: axes_held_at_zero=(translation1 translation2 translation3)
        TransformAxis rotation1: coordinates=hip_flexion_l axis=(0 0 1) LinearFunction(coefficients=1 0)
        TransformAxis rotation2: coordinates=hip_adduction_l axis=(1 0 0) LinearFunction(coefficients=-1 0)
        TransformAxis rotation3: coordinates=hip_rotation_l axis=(0 1 0) LinearFunction(coefficients=-1 0)
    CustomJoint walker_knee_l: socket_parent_frame=femur_l_offset socket_child_frame=tibia_l_offset
      Coordinate knee_angle_l: default_value=0.0001047757 range=(0 2.9) clamped=true
      PhysicalOffsetFrame femur_l_offset: socket_parent=/bodyset/femur_l translation=(-0.00809 -0.40796 0.00275)
          orientation=(1.64157 -1.44618 1.5708)
      PhysicalOffsetFrame tibia_l_offset: socket_parent=/bodyset/tibia_l
          translation=(-0.00808954 -0.0035348 0.00148474) orientation=(1.64157 -1.44618 1.5708)
      SpatialTransform: axes_held_at_zero=translation3
        TransformAxis rotation1: coordinates=knee_angle_l axis=(-1 0 0) LinearFunction(coefficients=1 0)
        TransformAxis rotation2: coordinates=knee_angle_l axis=(0 0 1)
          SimmSpline: x=(0 0.174533 0.349066 0.523599 0.698132 0.872665 1.0472 1.22173 1.39626 1.5708 1.74533 1.91986 2.0944)
              y=(0 0.0126809 0.0226969 0.0296054 0.0332049 0.0335354 0.0308779 0.0257548 0.0189295 0.011407 0.00443314 -0.00050475 -0.0016782)
        TransformAxis rotation3: coordinates=knee_angle_l axis=(0 1 0)
          SimmSpline: x=(0 0.174533 0.349066 0.523599 0.698132 0.872665 1.0472 1.22173 1.39626 1.5708 1.74533 1.91986 2.0944)
              y=(0 -0.059461 -0.109399 -0.150618 -0.18392 -0.210107 -0.229983 -0.24435 -0.254012 -0.25977 -0.262428 -0.262788 -0.261654)
        TransformAxis translation1: coordinates=knee_angle_l axis=(0 1 0)
          SimmSpline: x=(0 0.174533 0.349066 0.523599 0.698132 0.872665 1.0472 1.22173 1.39626 1.5708 1.74533 1.91986 2.0944)
              y=(0 0.000479 0.000835 0.001086 0.001251 0.001346 0.001391 0.001403 0.0014 0.0014 0.001421 0.001481 0.001599)
        TransformAxis translation2: coordinates=knee_angle_l axis=(0 0 1)
          SimmSpline: x=(0 0.174533 0.349066 0.523599 0.698132 0.872665 1.0472 1.22173 1.39626 1.5708 1.74533 1.91986 2.0944)
              y=(0 -0.000988 -0.001899 -0.002734 -0.003492 -0.004173 -0.004777 -0.005305 -0.005756 -0.00613 -0.006427 -0.006648 -0.006792)
    CustomJoint patellofemoral_l: socket_parent_frame=femur_l_offset socket_child_frame=patella_l_offset
      Coordinate knee_angle_l_beta: default_value=0.0001047757 range=(-99999.9 99999.9) clamped=false
      PhysicalOffsetFrame femur_l_offset: socket_parent=/bodyset/femur_l translation=(-0.00809 -0.40796 0.00275)
      PhysicalOffsetFrame patella_l_offset: socket_parent=/bodyset/patella_l translation=(0 0 0)
      SpatialTransform: axes_held_at_zero=(rotation2 rotation3)
        TransformAxis rotation1: coordinates=knee_angle_l_beta axis=(0 0 1)
          SimmSpline: x=(0 0.174533 0.349066 0.523599 0.698132 0.872665 1.0472 1.22173 1.39626 1.5708 1.74533 1.91986 2.0944)
              y=(0.00113686 -0.00629212 -0.105582 -0.253683 -0.414245 -0.579047 -0.747244 -0.91799 -1.09044 -1.26379 -1.43763 -1.61186 -1.78634)
        TransformAxis translation1: coordinates=knee_angle_l_beta axis=(1 0 0)
          SimmSpline: x=(0 0.174533 0.349066 0.523599 0.698132 0.872665 1.0472 1.22173 1.39626 1.5708 1.74533 1.91986 2.0944)
              y=(0.0524 0.0488 0.0437 0.0371 0.0296 0.0216 0.0136 0.0057 -0.0019 -0.0088 -0.0148 -0.0196 -0.0227)
        TransformAxis translation2: coordinates=knee_angle_l_beta axis=(0 1 0)
          SimmSpline: x=(0 0.174533 0.349066 0.523599 0.698132 0.872665 1.0472 1.22173 1.39626 1.5708 1.74533 1.91986 2.0944)
              y=(-0.0108 -0.019 -0.0263 -0.0322 -0.0367 -0.0395 -0.0408 -0.0404 -0.0384 -0.0349 -0.0301 -0.0245 -0.0187)
        TransformAxis translation3: axis=(0 0 1) Constant(value=-0.00275)
    PinJoint ankle_l: socket_parent_frame=tibia_l_offset socket_child_frame=talus_l_offset
      Coordinate ankle_angle_l: default_value=-2.486443e-9 range=(-0.6981317 0.5235988) clamped=true
      PhysicalOffsetFrame tibia_l_offset: socket_parent=/bodyset/tibia_l translation=(-0.01 -0.4 0)
          orientation=(-0.175895 0.105208 0.0186622)
      PhysicalOffsetFrame talus_l_offset: socket_parent=/bodyset/talus_l translation=(0 0 0)
          orientation=(-0.175895 0.105208 0.0186622)
    PinJoint subtalar_l: socket_parent_frame=talus_l_offset socket_child_frame=calcn_l_offset
      Coordinate subtalar_angle_l: default_value=0 range=(-0.3490659 0.3490659) clamped=true
      PhysicalOffsetFrame talus_l_offset: socket_parent=/bodyset/talus_l translation=(-0.04877 -0.04195 -0.00792)
          orientation=(1.76819 -0.906223 1.8196)
      PhysicalOffsetFrame calcn_l_offset: socket_parent=/bodyset/calcn_l translation=(0 0 0)
          orientation=(1.76819 -0.906223 1.8196)
    PinJoint mtp_l: socket_parent_frame=calcn_l_offset socket_child_frame=toes_l_offset
      Coordinate mtp_angle_l: default_value=0 range=(-0.5235988 0.5235988) clamped=true
      PhysicalOffsetFrame calcn_l_offset: socket_parent=/bodyset/calcn_l translation=(0.1788 -0.002 -0.00108)
          orientation=(-3.14159 -0.619901 0)
      PhysicalOffsetFrame toes_l_offset: socket_parent=/bodyset/toes_l translation=(0 0 0)
          orientation=(-3.14159 -0.619901 0)
  MarkerSet:
    Marker ij: thorax (0 0 0)
    Marker c7: thorax (-0.0899063 0.0327569 0)
    Marker t8: thorax (-0.111155 -0.154433 0)
    Marker px: thorax (0.0697635 -0.164311 0)
